# MX-9D
# Temporary mass file for dynamic stability
# Michael Chen, September 18, 2023

Lunit = 1 m
Munit = 1 kg
Tunit = 1 s
g     = 9.81
rho   = 1.14

#
# ==== Mass and Intertia Breakdown ====
#

# Mass      Xcg       Ycg       Zcg        [ Ixx Iyy Izz Ixy Ixz Iyz ]

# ---- Fuselage ----
# Structure
# 1.894     0.6858    0.000     0.000        0   0   0   0   0   0   ! Outer Skin (Center)
# 0.932     0.6858    0.000     0.000        0   0   0   0   0   0   ! Outer Skin (Center)
# 0.458     0.7788    -0.0332   0.000        0   0   0   0   0   0   ! Outer Skin (Left Transition)
# 0.458     0.7788    0.0332    0.000        0   0   0   0   0   0   ! Outer Skin (Right Transition)
  1.848     0.6350    0.000     0.000        0   0   0   0   0   0   ! Outer Skin (Entire thing, sum of above, xcg estimated using fuselage halves no bulkheads 1/20)

# Electronics (Done)
  0.153     0.0762    0.000     0.000        0   0   0   0   0   0   ! ESC
  0.744     0.2159    0.000     0.000        0   0   0   0   0   0   ! Main Battery
  0.065     0.2858    0.000     0.000        0   0   0   0   0   0   ! RX Battery
  0.017     0.2858    0.000     0.000        0   0   0   0   0   0   ! RX
  0.018     0.8992    0.0254    0.000        0   0   0   0   0   0   ! Drop Mechanism
  0.018     0.8992   -0.0254    0.000        0   0   0   0   0   0   ! Drop Mechanism
  0.085     0.3048    0.000     0.000        0   0   0   0   0   0   ! DAS (xcg moved to front, estimated using info from Evan 1/20)
  0.057     1.1367    0.000    -0.0508       0   0   0   0   0   0   ! Camera
  0.011     0.4318    0.0508    0.000        0   0   0   0   0   0   ! DAS Antennas (xcg updated using marks on fuselage 1/20)
  0.011     0.4318   -0.0508    0.000        0   0   0   0   0   0   ! DAS Antennas


# Landing Gear (check main gear position)
  0.443     0.675     0.000    -0.1778       0   0   0   0   0   0   ! Main Gear
  0.2268    2.4576    0.000    -0.0254       0   0   0   0   0   0   ! Tail Dragger

# Payloads (done)
  3.402     0.5       0.000     0.0000       0   0   0   0   0   0   ! 7.5 lb Water
  3.402     0.8992    0.000     0.0000       0   0   0   0   0   0   ! 7.5 lb Water
# 0.454     0.8992    0.000    -0.1524       0   0   0   0   0   0   ! PADA

# Propulsion (Done)
  0.595     -0.0508   0.0       0.0          0   0   0   0   0   0   ! Hacker A60 5S motor
  0.085     -0.0762   0.0       0.0          0   0   0   0   0   0   ! 24x13 Falcon Propeller

# ---- Wings ----
+ 0.000     0.6096    0.1294    0.000        0   0   0   0   0   0   ! LE Offset
* 1.000     1.000    -1.000     1.000        1   1   1   1   1   1   ! Left Multiplier

# Left Wing (Done)
  0.792     0.1778    0.6164    0.000        0   0   0   0   0   0   ! Left Wing (x position estimated using actual wing, without leading edge) (7.5 from leading edge - 0.5 fudge for no leading 1/20)

* 1.000     1.000     1.000     1.000        1   1   1   1   1   1   ! Right

# Right Wing (Done)
  0.792     0.1778    0.6164    0.000        0   0   0   0   0   0   ! Right Wing

# ---- Tail ----
+ 0.000     1.3716    0.000     0.0254       0   0   0   0   0   0   ! Tail Boom Start Offset

# Tail Boom
  0.5264    0.5430    0.000     0.000        0   0   0   0   0   0   ! Tail Boom

+ 0.000     2.2203    0.000     0.0254       0   0   0   0   0   0   ! Tail LE Offset
* 1.000     1.000    -1.000     1.000        1   1   1   1   1   1   ! Left

# Left Horizontal Tail
  0.1483    0.1186    0.2966    0.000        0   0   0   0   0   0   ! Left H-Stab

* 1.000     1.000     1.000     1.000        1   1   1   1   1   1   ! Right

# Right Horizontal Tail
  0.1483    0.1186    0.2966    0.000        0   0   0   0   0   0   ! Right H-Stab
  0.0277    0.1186    0.000     0.000        0   0   0   0   0   0   ! KST 125 Servo

# Vertical Tail
  0.1322    0.1186    0.000     0.2644       0   0   0   0   0   0   ! V-Stab
  0.0277    0.1186    0.000     0.2644       0   0   0   0   0   0   ! KST 125 Servo
