MX-9
# Rectangular fuselage, trapezoidal transition region, tapered wing, rectangular h-tail
# Michael Chen, July 29, 2023

0.0                   ! Mach
0      0      0.0     ! iYsym  iZsym  Zsym
1.4976 0.6048 3.0328  ! Sref Cref Bref
0.7456 0.0    0.0     ! Xref   Yref   Zref

#
# ==== Fuselage ====
#
SURFACE
Fuselage

# Horseshoe Vortex Distribution
# Nchord    Cspace    Nspan    Sspace
20 1.0 5 1.0

COMPONENT
1

YDUPLICATE
0.0

#CDCL
#CL1 CD1          CL2 CD2           CL3 CD3
#-0.72050 0.03472  0.07551 0.00668   1.48311 0.03231

# ---- Center ----
SECTION
# Xle    Yle    Zle    chord    angle
0.0      0.0    0.0    1.3716   0.0

AFILE
/Users/michaelchen/Documents/M-Fly/2023/Airfoils/Fuselage/naca23012.dat

CLAF
0.9756

# ---- Fuselage End ----
SECTION
# Xle    Yle    Zle    chord    angle
0.0      0.0532 0.0    1.3716   0.0

AFILE
/Users/michaelchen/Documents/M-Fly/2023/Airfoils/Fuselage/naca23012.dat

CLAF
0.9756


#
# ==== Transition ====
#
SURFACE
Transition

# Horseshoe Vortex Distribution
# Nchord    Cspace    Nspan    Sspace
15 1.0 5 1.0

COMPONENT
1

YDUPLICATE
0.0

# ---- Transition Start ----
SECTION
# Xle    Yle    Zle    chord    angle
0.0      0.0532 0.0    1.3716   0.0

AFILE
/Users/michaelchen/Documents/M-Fly/2023/Airfoils/Fuselage/naca23012.dat

CLAF
0.9756

#CDCL
#CL1 CD1          CL2 CD2           CL3 CD3
#-0.72050 0.03472  0.07551 0.00668   1.48311 0.03231

# ---- Transition End ----
SECTION
# Xle    Yle    Zle    chord    angle
0.5944    0.1294 -0.033    0.6096   0.0

AFILE
/Users/michaelchen/Documents/M-Fly/2023/Airfoils/Wing/ch10sm.dat

CLAF
0.8808

#CDCL
#CL1 CD1          CL2 CD2           CL3 CD3
#0.87037 0.01560   1.45536 0.01125   2.02906 0.02960


#
# ==== Wing ====
#
SURFACE
Wing

# Horseshoe Vortex Distribution
# Nchord    Cspace    Nspan    Sspace
10 1.0 20 1.0

COMPONENT
1

YDUPLICATE
0.0

#CDCL
#CL1 CD1          CL2 CD2           CL3 CD3
#0.87037 0.01560   1.45536 0.01125   2.02906 0.02960

# ---- Wing Start ----
SECTION
# Xle    Yle    Zle    chord    angle
0.5944   0.1294 -0.033    0.6096   0.0

AFILE
/Users/michaelchen/Documents/M-Fly/2023/Airfoils/Wing/ch10sm.dat

CLAF
0.8808

# ---- Aileron Start ----
SECTION
# Xle    Yle    Zle    chord    angle
0.5944   0.8340 -0.033  0.4300   0.0

AFILE
/Users/michaelchen/Documents/M-Fly/2023/Airfoils/Wing/ch10sm.dat

CLAF
0.8808

CONTROL
# surface gain   xhinge hvec     SgnDup
Aileron   1.0    0.5757 0 1 0    -1

# ---- Aileron End ----
SECTION
# Xle    Yle    Zle    chord    angle
0.5944   1.3647 -0.033 0.2947   0.0

AFILE
/Users/michaelchen/Documents/M-Fly/2023/Airfoils/Wing/ch10sm.dat

CLAF
0.8808

CONTROL
# surface gain   xhinge hvec     SgnDup
Aileron   1.0    0.84   0 1 0    -1

# ---- Wing Tip ----
SECTION
# Xle    Yle    Zle    chord    angle
0.5944   1.5164 -0.033    0.256    0.0

AFILE
/Users/michaelchen/Documents/M-Fly/2023/Airfoils/Wing/ch10sm.dat

CLAF
0.8808


#
# ==== H-Tail ====
#
SURFACE
H-Tail

# Horseshoe Vortex Distribution
# Nchord    Cspace    Nspan    Sspace
10 1.0 20 1.0

YDUPLICATE
0.0

#CDCL
#CL1 CD1          CL2 CD2           CL3 CD3
#-1.07477 0.04380  0.0 0.01020       1.07553 0.04382

# ---- Tail Root ----
SECTION
# Xle    Yle    Zle    chord    angle
2.134    0.0    0.0254 0.2373   0.0

NACA
0012

CONTROL
# surface gain   xhinge hvec     SgnDup
Elevator  -1.0   0.5    0 1 0    1

# ---- Tail Tip ----
SECTION
# Xle    Yle    Zle    chord    angle
2.134    0.5932 0.0254 0.2373   0.0

NACA
0012

CONTROL
# surface gain   xhinge hvec     SgnDup
Elevator  -1.0   0.5    0 1 0    1


#
# ==== V-Tail ====
#
SURFACE
V-Tail

# Horseshoe Vortex Distribution
# Nchord    Cspace    Nspan    Sspace
10 1.0 20 1.0

#CDCL
#CL1 CD1          CL2 CD2           CL3 CD3
#-1.07477 0.04380  0.0 0.01020       1.07553 0.04382

# ---- Tail Tip ----
SECTION
# Xle    Yle    Zle    chord    angle
2.134    0.0    0.5542 0.2373   0.0

NACA
0012

CONTROL
# surface gain   xhinge hvec     SgnDup
Rudder    1.0    0.5    0 0 1    1

# ---- Tail Root ----
SECTION
# Xle    Yle    Zle    chord    angle
2.134    0.0    0.0254 0.2373   0.0

NACA
0012

CONTROL
# surface gain   xhinge hvec     SgnDup
Rudder    1.0    0.5    0 0 1    1
